// COMSOL Multiphysics 6.1.0.282 model "Networkless4MPH.mph"
// Electric Field from Power Lines
// Power lines are commonly used as a means of transmitting electrical power across large distances. In this tutorial, towers transmitting high voltage three-phase AC power are modeled, and the resulting electric field is computed. The towers have two shielding lines above the phase lines, which protect the tower from lightning strikes. \n\nThe model also illustrates the strength of using the boundary element method (BEM) for modeling, which is used by the Electrostatics, Boundary Elements physics interface.
// Outline of the model tree

Parameters
  V0 = 400[kV]  // Power line voltage
  r0 = 0.1 [cm]  // Phase line radius
  rs = 0.1[cm]  // Shielding line radius

Functions
  extm1: MATLAB
    funcs = 
      {VIwire, x,y,z,wpw,extra,f,VorC}
      {VIwire_deriv, x,y,z,wpw,f,whichxyz,VorC}
      {WireRad, x,y,z,wpw}
    ders = 
      {VIwire, x, VIwire_deriv(x,y,z,wpw,esbe.freq,1,1)}
      {VIwire, y, VIwire_deriv(x,y,z,wpw,esbe.freq,2,1)}
      {VIwire, z, VIwire_deriv(x,y,z,wpw,esbe.freq,3,1)}

Coordinate systems
  sys1: Boundary "Boundary System 1"

Common definitions
  ampr1: AmbientProperties

Geometry
  geom1 "Geometry 1" (3D, length unit m)
    wp1: WorkPlane (disabled) | unite = on
    sca1: Scale (disabled)
      input = imp1
      type = anisotropic
      isotropic = 0.25
      anisotropic = {1, 1, 0.25}
      factor = {1, 1, 0.25}
    imp2: Import (disabled) | type = cad; filename = C:\Users\cmkatin\Documents\COMOSL\NewTower.step; keepfree = on
    del1: Delete "Delete Entities 1" (disabled) | input = imp2.Model_Model
    del2: Delete "Delete Entities 2" (disabled)
      input = imp2.id4340 edges 63, 72, 91, 464, 481, 505, 799, 817, 853, 1236, 1252, 1275, 1547, 1556, 1575
    del3: Delete "Delete Entities 3" (disabled)
      input = imp2.id4340 edges 1-62, 64-71, 73-90, 92-463, 465-480, 482-504, 506-798, 800-816, 818-852, 854-1235, 1237-1251, 1253-1274, 1276-1546, 1548-1555, 1557-1574, 1576-1599
    fin: Finalize "Form Union"

Materials
  mat1: Common "Air" on no domains
    def "Basic"
      thermalexpansioncoefficient = alpha_p(pA,T)
      molarmass = 0.02897[kg/mol]
      bulkviscosity = muB(T)
      relpermeability = 1
      relpermittivity = 1
      dynamicviscosity = eta(T)
      ratioofspecificheat = 1.4
      electricconductivity = 0[S/m]
      heatcapacity = Cp(T)
      density = rho(pA,T)
      thermalconductivity = k(T)
      soundspeed = cs(T)
      eta: Piecewise | arg = T; pieces = {200.0, 1600.0, -8.38278E-7+8.35717342E-8*T^1-7.69429583E-11*T^2+4.6437266E-14*T^3-1.06585607E-17*T^4}; argunit = K; fununit = Pa*s
      Cp: Piecewise | arg = T; pieces = {200.0, 1600.0, 1047.63657-0.372589265*T^1+9.45304214E-4*T^2-6.02409443E-7*T^3+1.2858961E-10*T^4}; argunit = K; fununit = J/(kg*K)
      rho: Analytic | expr = pA*0.02897/R_const[K*mol/J]/T; args = {pA, T}; fununit = kg/m^3; argunit = {Pa, K}
      k: Piecewise | arg = T; pieces = {200.0, 1600.0, -0.00227583562+1.15480022E-4*T^1-7.90252856E-8*T^2+4.11702505E-11*T^3-7.43864331E-15*T^4}; argunit = K; fununit = W/(m*K)
      cs: Analytic | expr = sqrt(1.4*R_const[K*mol/J]/0.02897*T); args = T; fununit = m/s; argunit = K
      an1: Analytic | funcname = alpha_p; expr = -1/rho(pA,T)*d(rho(pA,T),T); args = {pA, T}; fununit = 1/K; argunit = {Pa, K}
      an2: Analytic "Analytic 2a" | funcname = muB; expr = 0.6*eta(T); args = T; fununit = Pa*s; argunit = K
    RefractiveIndex
      n = 1
      ki = 0
    NonlinearModel
      BA = (def.gamma+1)/2
    idealGas
      Rs = R_const/Mn
      heatcapacity = Cp(T)
      ratioofspecificheat = 1.4
      molarmass = 0.02897
      Cp: Piecewise | arg = T; pieces = {200.0, 1600.0, 1047.63657-0.372589265*T^1+9.45304214E-4*T^2-6.02409443E-7*T^3+1.2858961E-10*T^4}; argunit = K; fununit = J/(kg*K)

Physics
  esbe: ElectrostaticsBoundaryElements on all domains
    dependent variable V
    ccn1: ChargeConservation (default)
    zc1: ZeroCharge (default)
    zc2: ZeroChargeEdge "Zero Charge 2" (default)
    init1: init2 "Initial Values 1" (default)
    pot1: ElectricPotentialEdge "Electric Potential 1" on no edges
      V0 = VIwire(x,y,z,1,0,esbe.freq,1)
      redge = WireRad(x,y,z,1)
    pot2: ElectricPotentialEdge "Electric Potential 2" on no edges
      V0 = VIwire(x,y,z,2,0,esbe.freq,1)
      redge = WireRad(x,y,z,2)
    pot3: ElectricPotentialEdge "Electric Potential 3" on no edges
      V0 = VIwire(x,y,z,3,0,esbe.freq,1)
      redge = WireRad(x,y,z,3)
    gnd1: Ground on no boundaries
    gnd2: GroundEdge "Ground 2" on no edges | redge = WireRad(x,y,z,0)
    gnd3: GroundEdge "Ground 3" (disabled) on no edges

Mesh
  mesh1 "Mesh 1" (physics-controlled)
    size: MeshSizeDefault | hauto = 2

Studies
  std1 "Study 1"
    freq: Frequency "Frequency Domain" | plist = 50

Solver configurations
  sol1 "Solution 1" (study std1)
    v1: Variables "Dependent Variables 1"
    s1: Stationary "Stationary Solver 1" | linpmethod = sol
      p1: Parametric | pname = freq; plistarr = 50; punit = Hz; pcontinuationmode = no
      fc1: FullyCoupled | linsolver = i1
      i1: Iterative "Suggested Iterative Solver (esbe)" | linsolver = bicgstab; prefuntype = right
        dp1: DirectPreconditioner | linsolver = pardiso

Datasets
  dset1: Solution | solution = sol1
  grid1: Grid3D | source = data; data = dset1; parmin1 = -150; parmax1 = 150; parmin2 = -150; parmax2 = 150; parmax3 = 100

Plots
  pg1: PlotGroup3D "Electric Field Norm (surface)" | data = grid1
    line1: Line (disabled) | data = dset1; expr = 1; linetype = tube; radiusexpr = 0.1
      sel1: Selection on edges 4-6, 10-12, 16-18
      mtrl1: MaterialAppearance | appearance = custom; family = steel
    line2: Line | data = dset1; expr = 1; radiusexpr = 0.1
      sel1: Selection
    line3: Line (disabled) | data = dset1; expr = Vwire(x, y, z); descr = MATLAB 1; linetype = tube; radiusexpr = 5
      sel1: Selection on edges 4-6, 10-12, 16-18
    surf1: Surface (disabled) | data = dset1; expr = esbe.normE
      sel1: Selection
    strmsl1: StreamlineMultislice (disabled) | expr = {esbe.Ex, esbe.Ey, esbe.Ez}; xnumber = 0; znumber = 0; udist = 0.02
      col1: Color "Color Expression 1" | expr = esbe.normE
    arwv1: ArrowVolume
      expr = {esbe.Ex, esbe.Ey, esbe.Ez}
      xnumber = 10
      ynumber = 10
      znumber = 10
      arrowlength = normalized
      col1: Color "Color Expression 1" | unit = V/m; expr = sqrt(abs(esbe.Ex)^2 + abs(esbe.Ey)^2 + abs(esbe.Ez)^2)
    slc1: Slice (disabled)
      expr = esbe.normE
      quickxnumber = 1
      quickynumber = 1
      genpoints = {{0, 0, 0}, {10, 10, 0}, {10, 10, 10}}

Exports
  plot1: Plot | filename = ExpEData